<Lems>

    <!--

        This LEMS file has been automatically generated using PyNeuroML v0.1.7 (libNeuroML v0.2.10)

     -->

    <!-- Specify which component to run -->
    <Target component="Simple_Golgi_Net"/>

    <!-- Include core NeuroML2 ComponentType definitions -->
    <Include file="Cells.xml"/>
    <Include file="Networks.xml"/>
    <Include file="Simulation.xml"/>

    <Include file="Very_Simple_Golgi.cell.nml"/>
    <Include file="Golgi_Na.channel.nml"/>
    <Include file="Golgi_KV.channel.nml"/>
    <Include file="LeakCond.channel.nml"/>
    <Include file="Simple_Golgi_Net.net.nml"/>

    <Component type="Simulation" id="Simple_Golgi_Net" length="500ms" step="0.001ms" target="Simple_Golgi_Net_network">

      <Display id="display_voltages0" title="Voltages Golgi_pop0" timeScale="1ms" xmin="-50.0" xmax="550.0" ymin="-75" ymax="50">
            <Line id="Golgi_pop0_0" quantity="Golgi_pop0/0/Very_Simple_Golgi/v" scale="1mV" color="#8fe460" timeScale="1ms"/>
            <Line id="Golgi_pop1_1" quantity="Golgi_pop0/1/Very_Simple_Golgi/v" scale="1mV" color="#2ca1c7" timeScale="1ms"/>
        </Display>

        <OutputFile id="Volts0_file" fileName="Golgi_pop0.dat">
            <OutputColumn id="v0" quantity="Golgi_pop0/0/Very_Simple_Golgi/v"/>
            <OutputColumn id="v1" quantity="Golgi_pop0/1/Very_Simple_Golgi/v"/>
        </OutputFile>

       <!-- <Display id="display_voltages0" title="Voltages Golgi_pop0" timeScale="1ms" xmin="-50.0" xmax="550.0" ymin="-75" ymax="50">
            <Line id="../Golgi_pop0/0: Vm" quantity="Golgi_pop0[0]" scale="1mV" color="#8fe460" timeScale="1ms"/>
            <Line id="../Golgi_pop0/1: Vm" quantity="Golgi_pop0[1]" scale="1mV" color="#2ca1c7" timeScale="1ms"/>
        </Display>

        <OutputFile id="Volts0_file" fileName="Golgi_pop0.dat">
            <OutputColumn id="v0" quantity="Golgi_pop0[0]"/>
            <OutputColumn id="v1" quantity="Golgi_pop0[1]"/>
        </OutputFile>-->

    </Component>

</Lems>
